// COMSOL Multiphysics 5.1.0.145 model "one_droplet_spot_on_higher_place.mph"
// Outline of the model tree

Parameters
  rad = (0.5/2) [mm]
  box_width = 10 [mm]

Selections
  sel1: Explicit "Droplet surface" on boundaries 6-10, 13, 15, 16, 18, 19

Probes
  dom1: Domain "Domain Probe 1" on all domains | type = maximum; expr = T; unit = degC; table = tbl1
  bnd1: Boundary "Total Force X (upward)" on selection sel1 | type = integral; expr = -spf.T_stress_ux; table = tbl1
  bnd2: Boundary "Total Force Y (upward)" on selection sel1
    type = integral
    probename = tot_force_y
    expr = -spf.nymesh*(up(p)-down(p)) + spf.K_stressy
    table = tbl1
  bnd3: Boundary "Total Force Z (upward)" on selection sel1 | type = integral; expr = -spf.T_stress_uz; table = tbl1
  bnd4: Boundary "Viscous force Y" on selection sel1
    type = integral
    probename = viscous_force_y
    expr = spf.K_stressy
    table = tbl1
  bnd7: Boundary "Viscous force Z" on selection sel1 | type = integral; expr = spf.K_stressz; table = tbl1
  bnd5: Boundary "Pressure Y (UP)" on selection sel1
    type = integral
    probename = pressure_force_y_up
    expr = -spf.nymesh*(up(p)-down(p))
    table = tbl1
  bnd6: Boundary "Pressure Z (UP)" on selection sel1 | type = integral; expr = -spf.nzmesh*up(p); table = tbl1
  bnd8: Boundary "Pressure Z (DOWN)" on selection sel1 | type = integral; expr = -spf.nzmesh*down(p); table = tbl1
  bnd9: Boundary "Torque" on selection sel1
    type = integral
    expr = (z)*(-spf.nymesh*(up(p)-down(p)) + spf.K_stressy) - (y+rad)*(-spf.nzmesh*(up(p)-down(p)) + spf.K_stressz)
    table = tbl1

Geometry
  geom1 "Geometry 1" (3D, length unit mm)
    blk1: Block | base = center; size = {box_width, box_width, rad*10}
    sph1: Sphere | pos = {0, -2*rad, 0.1}; r = 0.1
    sph3: Sphere | pos = {0, -rad, 0}; r = rad
    sph4: Sphere (disabled) | pos = {0, rad, 0}; r = rad
    par1: Partition "Partition Objects 1" | input = sph3, sph4; tool = sph1
    pt1: Point | p = {box_width*0.4, 0, 0}
    pt2: Point | p = {0, -rad, 0}
    pt3: Point (disabled) | p = {0, -rad*2-(0.3 [mm]), 0}
    fin: Finalize "Form Union"

Materials
  mat4: Common "Water and ethyleneglycol 1-1, liquid" on all domains
    def "Basic"
      dynamicviscosity = 2.80*eta(T[1/K])[Pa*s]
      ratioofspecificheat = 1.0
      electricconductivity = 5.5e-6[S/m]
      heatcapacity = 3.41/4.18*Cp(T[1/K])[J/(kg*K)]
      density = 1.055*rho(T[1/K])[kg/m^3]
      thermalconductivity = 0.36/0.6*k(T[1/K])[W/(m*K)]
      soundspeed = cs(T[1/K])[m/s]
      eta: Piecewise
        arg = T
        pieces = 
          {273.15, 413.15, 1.3799566804-0.021224019151*T^1+1.3604562827E-4*T^2-4.6454090319E-7*T^3+8.9042735735E-10*T^4-9.0790692686E-13*T^5+3.8457331488E-16*T^6}
          {413.15, 553.75, 0.00401235783-2.10746715E-5*T^1+3.85772275E-8*T^2-2.39730284E-11*T^3}
      Cp: Piecewise | arg = T; pieces = {273.15, 553.75, 12010.1471-80.4072879*T^1+0.309866854*T^2-5.38186884E-4*T^3+3.62536437E-7*T^4}
      rho: Piecewise | arg = T; pieces = {273.15, 553.75, 838.466135+1.40050603*T^1-0.0030112376*T^2+3.71822313E-7*T^3}
      k: Piecewise | arg = T; pieces = {273.15, 553.75, -0.869083936+0.00894880345*T^1-1.58366345E-5*T^2+7.97543259E-9*T^3}
      cs: Interpolation | table = {{273, 1403}, {278, 1427}, {283, 1447}, {293, 1481}, {303, 1507}, {313, 1526}, {323, 1541}, {333, 1552}, {343, 1555}, {353, 1555}, {363, 1550}, {373, 1543}}; interp = piecewisecubic
  mat3: Common "Toluene(0.33) and DCB(0.66)" on domains 1
    def "Basic"
      dynamicviscosity = 1.09/0.583*eta(T[1/K])[Pa*s]
      heatcapacity = 1.088/1.7*Cp(T[1/K])[J/(kg*K)]
      density = 1155/867*rho(T[1/K])[kg/m^3]
      thermalconductivity = 0.1274/0.141*k(T[1/K])[W/(m*K)]
      ratioofspecificheat = 1
      eta: Piecewise | arg = T; pieces = {253.0, 383.0, 0.0215055169-1.73085791E-4*T^1+4.77480128E-7*T^2-4.4508547E-10*T^3}
      Cp: Piecewise
        arg = T
        pieces = 
          {162.0, 350.0, 1954.89344-6.78419439*T^1+0.0268169568*T^2-2.30150582E-5*T^3}
          {350.0, 500.0, 581.176489+4.95779053*T^1-0.0065998837*T^2+8.63787712E-6*T^3}
      rho: Piecewise | arg = T; pieces = {273.15, 373.15, 1102.75323-0.679749494*T^1-4.23104421E-4*T^2}
      k: Piecewise | arg = T; pieces = {230.0, 360.0, 0.220486602-2.99892954E-4*T^1}

Physics
  spf: LaminarFlow on all domains
    dependent variable u = {u, v, w}
    AdvancedSettingProperty.UsePseudoTime = 1
    fp1: FluidProperties (default)
    init1: init "Initial Values 1" (default)
    wall1: Wall (default) | BoundaryCondition = Slip
    iw1: InteriorWall on boundaries 6-10, 13, 15, 16, 18, 19 | BoundaryCondition = NoSlip
    vf1: VolumeForce on all domains | F = {0, 0, -1*g_const*nitf1.rho}
    prpc1: PressurePointConstraint on points 11, 16
    disc1: Discretization | order_fluid = 2
  ht: HeatTransferInFluids on all domains
    dependent variable T
    ShapeProperty.order_temperature = 1
    fluid1: FluidHeatTransferModel "Heat Transfer in Fluids 1" (default)
    init1: init "Initial Values 1" (default)
    ins1: ThermalInsulation (default)
    hf1: HeatFluxBoundary "Heat Flux 1" on boundaries 4
      HeatFluxType = ConvectiveHeatFlux
      HeatTransferCoefficientType = ExtNaturalConvection
      ExtNaturalConvectionType = HorizontalPlateUp
      Ldia = rad
    bhs1: BoundaryHeatSource on boundaries 10, 13 | heatSourceType = OverallHeatTransferRate; Pb = 70e-3*0.3

Multiphysics
  nitf1: NonIsothermalFlow on all domains
    includeWorkDoneByPressureChanges = 1
    includeViscousDissipation = 1
    Fluid_physics = spf
    Heat_physics = ht

Mesh
  mesh1 "Mesh 1" (physics-controlled)
    size: MeshSizeDefault | table = cfd; hauto = 4

Studies
  std1 "Study 1"
    time: Transient "Time Dependent" | tlist = range(0,1e-2,1); rtol = 0.001

Solver configurations
  sol1 "Solution 1" (study std1)
    v1: Variables "Dependent Variables 1"
    t1: Time "Time-Dependent Solver 1"
      tlist = range(0,1e-2,1)
      atolglobalmethod = scaled
      atolglobal = 5.0E-4
      maxorder = 2
      estrat = exclude
      fc1: FullyCoupled | linsolver = d1; maxiter = 6; damp = 0.9; jtech = once
      d1: Direct | linsolver = pardiso

Datasets
  dset1: Solution | solution = sol1
  surf1: Surface on boundaries 1-5, 20 | data = dset1
  surf2: Surface on boundaries 1-5, 20 | data = dset1
  surf3: Surface | data = dset1
  surf4: Surface on boundaries 1-5, 20 | data = dset1
  surf5: Surface on boundaries 1-5, 20 | data = dset1
  surf6: Surface | data = dset1
  surf7: Surface on boundaries 1-5, 20 | data = dset1
  surf8: Surface on boundaries 1-5, 20 | data = dset1
  surf9: Surface | data = dset1
  cpl1: CutPlane | data = dset1; genpoints = {{0, 0, 0}, {1, 0, 0}, {0, 1, 0}}
  cpl2: CutPlane | data = dset1; quickplane = zx; genpoints = {{0, 0, 0}, {1, 0, 0}, {0, 1, 0}}
  dset2: Solution "Probe Solution 2" | solution = sol1
  max1: Maximum "Domain Probe 1" on domains 1-3 | data = dset2
  surf10: Surface on boundaries 6-10, 13, 15, 16, 18, 19 | data = dset1
  int1: Integral "Total Force X (upward)" on boundaries 6-10, 13, 15, 16, 18, 19 | data = dset2
  int2: Integral "Total Force Y (upward)" on boundaries 6-10, 13, 15, 16, 18, 19 | data = dset2
  int3: Integral "Total Force Z (upward)" on boundaries 6-10, 13, 15, 16, 18, 19 | data = dset2
  int4: Integral "Viscous force Y" on boundaries 6-10, 13, 15, 16, 18, 19 | data = dset2
  int5: Integral "Pressure Y (UP)" on boundaries 6-10, 13, 15, 16, 18, 19 | data = dset2
  int6: Integral "Pressure Z (UP)" on boundaries 6-10, 13, 15, 16, 18, 19 | data = dset2
  int7: Integral "Viscous force Z" on boundaries 6-10, 13, 15, 16, 18, 19 | data = dset2
  int8: Integral on boundaries 6-10, 13, 15, 16, 18, 19 | data = dset1; method = summation
  int9: Integral "Pressure Z (DOWN)" on boundaries 6-10, 13, 15, 16, 18, 19 | data = dset2
  edg1: Edge3D on edges 16, 18, 22, 25, 27 | data = dset1
  int10: Integral "Torque" on boundaries 6-10, 13, 15, 16, 18, 19 | data = dset2
  mesh1: Mesh on domains 2, 3

Derived values
  pev1: EvalPoint "Domain Probe 1" | data = max1; table = tbl1; expr = T
  pev2: EvalPoint "Total Force X (upward)" | data = int1; table = tbl1; expr = -spf.T_stress_ux
  pev3: EvalPoint "Total Force Y (upward)" | data = int2; table = tbl6; expr = -spf.nymesh*(up(p)-down(p)) + spf.K_stressy
  pev4: EvalPoint "Total Force Z (upward)" | data = int3; table = tbl1; expr = -spf.T_stress_uz
  pev5: EvalPoint "Viscous force Y" | data = int4; table = tbl6; expr = spf.K_stressy
  pev8: EvalPoint "Viscous force Z" | data = int7; table = tbl1; expr = spf.K_stressz
  pev6: EvalPoint "Pressure Y (UP)" | data = int5; table = tbl6; expr = -spf.nymesh*(up(p)-down(p))
  pev7: EvalPoint "Pressure Z (UP)" | data = int6; table = tbl1; expr = -spf.nzmesh*up(p)
  int1: IntSurface "Surface Integration 1" on boundaries 6-10, 13, 15, 16, 18, 19
    data = dset1
    table = tbl4
    expr = spf.T_stress_uy
    descr = Total stress U, y component
  int2: IntSurface "Surface Integration 2" on boundaries 6-10, 13, 15, 16, 18, 19
    data = dset1
    table = tbl4
    expr = spf.T_stress_dy
    descr = Total stress D, y component
  int3: IntSurface "reacf_X" on boundaries 6-10, 13, 15, 16, 18, 19 | data = dset1; table = tbl4; expr = reacf(u)
  pev9: EvalPoint "Pressure Z (DOWN)" | data = int9; table = tbl1; expr = -spf.nzmesh*down(p)
  pev10: EvalPoint "Torque"
    data = int10
    table = tbl7
    expr = (z)*(-spf.nymesh*(up(p)-down(p)) + spf.K_stressy) - (y+rad)*(-spf.nzmesh*(up(p)-down(p)) + spf.K_stressz)

Tables
  tbl1: Table "Probe Table 1"
    t | Temperature (degC), Domain Probe 1 | -spf.T_stress_ux (N), Total Force X (upward) | -spf.nymesh*(up(p)-down(p)) + spf.K_stressy (N), Total Force Y (upward) | -spf.T_stress_uz (N), Total Force Z (upward) | Viscous stress, y component (N), Viscous force Y | Viscous stress, z component (N), Viscous force Z | -spf.nymesh*(up(p)-down(p)) (N), Pressure Y (UP) | -spf.nzmesh*up(p) (N), Pressure Z (UP) | -spf.nzmesh*down(p) (N), Pressure Z (DOWN) | (z)*(-spf.nymesh*(up(p)-down(p)) + spf.K_stressy) - (y+rad)*(-spf.nzmesh*(up(p)-down(p)) + spf.K_stressz) (J), Torque
    0 | 20.5681 | -7.04049e-19 | -2.9889e-14 | 7.36588e-07 | 2.29321e-15 | 1.16196e-15 | -3.21823e-14 | 7.36588e-07 | 6.72458e-07 | 3.79192e-14
    5.73642e-06 | 21.3795 | -3.87141e-17 | -1.12919e-13 | 7.35945e-07 | 1.47353e-14 | 3.03663e-14 | -1.27655e-13 | 7.35945e-07 | 6.71872e-07 | 3.78941e-14
    1.14728e-05 | 21.9394 | -6.84322e-17 | -2.00558e-13 | 7.35848e-07 | 3.0638e-14 | 7.68429e-14 | -2.31196e-13 | 7.35848e-07 | 6.71783e-07 | 3.79013e-14
    2.29457e-05 | 22.8254 | -9.80394e-17 | -3.81362e-13 | 7.35868e-07 | 6.85043e-14 | 1.95415e-13 | -4.49867e-13 | 7.35868e-07 | 6.71801e-07 | 3.79332e-14
    4.58913e-05 | 23.8677 | -7.24077e-17 | -7.43148e-13 | 7.35855e-07 | 1.73963e-13 | 5.34882e-13 | -9.1711e-13 | 7.35854e-07 | 6.71788e-07 | 3.80203e-14
    9.17827e-05 | 25.4212 | -1.45515e-16 | -1.44203e-12 | 7.35855e-07 | 4.19163e-13 | 1.31347e-12 | -1.86119e-12 | 7.35853e-07 | 6.71787e-07 | 3.82224e-14
    0.000183565 | 27.6002 | -5.52364e-16 | -2.79381e-12 | 7.35858e-07 | 9.55751e-13 | 3.00923e-12 | -3.74956e-12 | 7.35854e-07 | 6.71787e-07 | 3.86646e-14
    0.000367131 | 30.6651 | -1.45671e-15 | -5.44348e-12 | 7.35863e-07 | 2.06514e-12 | 6.55604e-12 | -7.50862e-12 | 7.35855e-07 | 6.71786e-07 | 3.95929e-14
    0.000734262 | 34.7659 | -2.97598e-15 | -1.07042e-11 | 7.35875e-07 | 4.24782e-12 | 1.37561e-11 | -1.4952e-11 | 7.35856e-07 | 6.71785e-07 | 4.14822e-14
    0.00146852 | 40.5427 | -5.39788e-15 | -2.12099e-11 | 7.35898e-07 | 8.35655e-12 | 2.80904e-11 | -2.95664e-11 | 7.35858e-07 | 6.71781e-07 | 4.52439e-14
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  tbl4: Table
    // Surface Integration 1 (spf.T_stress_dy)
    Time (s) | Total stress D, y component (N) | Total stress U, y component (N)
    0 | 4.07232e-15 | 2.32366e-14
    0.01 | 4.73037e-12 | 7.43255e-11
    0.02 | 7.43755e-12 | 1.42481e-10
    0.03 | 1.00273e-11 | 2.12174e-10
    0.04 | 1.21806e-11 | 2.87116e-10
    0.05 | 1.41274e-11 | 3.67837e-10
    0.06 | 1.58949e-11 | 4.55984e-10
    0.07 | 1.76037e-11 | 5.52799e-10
    0.08 | 1.87758e-11 | 6.57441e-10
    0.09 | 2.03903e-11 | 7.71065e-10
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  tbl6: Table "Forces only"
    // Total Force Y (upward) (-spf.nymesh*(up(p)-down(p)) + spf.K_stressy)
    Time (s) | -spf.nymesh*(up(p)-down(p)) + spf.K_stressy (N), Total Force Y (upward) | -spf.nymesh*(up(p)-down(p)) (N), Pressure Y (UP) | Viscous stress, y component (N), Viscous force Y
    0 | -2.9889e-14 | -3.21823e-14 | 2.29321e-15
    0.01 | -1.39607e-10 | -1.82945e-10 | 4.33374e-11
    0.02 | -2.6554e-10 | -3.36298e-10 | 7.07582e-11
    0.03 | -3.8318e-10 | -4.74231e-10 | 9.10511e-11
    0.04 | -4.93692e-10 | -6.00583e-10 | 1.06891e-10
    0.05 | -5.9781e-10 | -7.15765e-10 | 1.17955e-10
    0.06 | -6.9747e-10 | -8.22415e-10 | 1.24945e-10
    0.07 | -7.93294e-10 | -9.2168e-10 | 1.28386e-10
    0.08 | -8.85587e-10 | -1.01442e-09 | 1.28833e-10
    0.09 | -9.75678e-10 | -1.10241e-09 | 1.26734e-10
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  tbl7: Table
    // Torque ((z)*(-spf.nymesh*(up(p)-down(p)) + spf.K_stressy) - (y+rad)*(-spf.nzmesh*(up(p)-down(p)) + spf.K_stressz))
    Time (s) | (z)*(-spf.nymesh*(up(p)-down(p)) + spf.K_stressy) - (y+rad)*(-spf.nzmesh*(up(p)-down(p)) + spf.K_stressz) (J), Torque
    0 | 3.79192e-14
    0.01 | 8.65531e-14
    0.02 | 1.33151e-13
    0.03 | 1.78189e-13
    0.04 | 2.22384e-13
    0.05 | 2.65162e-13
    0.06 | 3.06314e-13
    0.07 | 3.4601e-13
    0.08 | 3.84432e-13
    0.09 | 4.21347e-13
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
Plots
  pg1: PlotGroup3D "3D Plot Group 1" | data = dset1
    surf1: Surface (disabled) | expr = T; unit = degC; title = Temperature (color, degrees Celcius)
    arws1: ArrowSurface (disabled) | expr = {u, v, w}; arrowcount = 500
    con1: Contour (disabled)
      expr = T
      unit = degC
      levelmethod = levels
      levels = 100
      contourtype = tubes
      contourlabels = off
      radiusexpr = 0.001
      tuberadiusscale = 2
    ptr1: ParticleMass "Particle Tracing with Mass 1" (disabled)
      mass = 4e-12
      xcoord = 0
      ycoord = -1.20 -1.20 -1.20 -1.20 -1.20 -1.20 -1.20 -1.20 -1.20 -1.20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
      zcoord = -2.00 -1.95 -1.90 -1.85 -1.80 -1.75 -1.70 -1.65 -1.60 -1.55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
      tstart = 0.02
      pointtype = point
      pointdom = disappear
  pg2: PlotGroup1D "Probe Plot Group 2" | data = none
    tblp1: Table "Probe Table Graph 1" | table = tbl1; plotcolumns = 2
  pg3: PlotGroup2D "2D Plot Group 3" | data = cpl1
    surf1: Surface (disabled) | expr = T; unit = degC
    arwl2: ArrowLine "Viscous field 1"
      expr = {spf.nzmesh*(-spf.nymesh*(up(p)-down(p)) + spf.K_stressy) - spf.nymesh*(-spf.nzmesh*(up(p)-down(p)) + spf.K_stressz), 0}
    arws1: ArrowSurface (disabled) | expr = {v, w}; xnumber = 100; ynumber = 30
  pg4: PlotGroup3D "Force fields" | data = surf10
    surf1: Surface (disabled) | expr = p
    arws1: ArrowSurface "Viscous stress" | expr = {0, spf.K_stressy, 0}
    arws2: ArrowSurface "Pressure" (disabled) | expr = {-up(p)*spf.nxmesh, -up(p)*spf.nymesh, -up(p)*spf.nzmesh}
    arws3: ArrowSurface "Total stress (Upward)" (disabled) | expr = {-spf.T_stress_ux, -spf.T_stress_uy, 0}
  pg5: PlotGroup2D "Forces in section" | data = cpl1
    surf1: Surface | expr = ht.C_eff; unit = J/(m^3*K); wireframe = off
    str1: Streamline
      expr = {v, w}
      startmethod = coord
      xcoord = -2.00 -2.00 -2.00 -2.00 -2.00 -2.00 -2.00 -2.00 -2.00 -2.00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
      ycoord = -1.00 -0.90 -0.80 -0.70 -0.60 -0.50 -0.40 -0.30 -0.20 -0.10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
      linetype = tube
      radiusexpr = 0.1
      tuberadiusscale = 0.004
      inttol = 0.0001
      maxsteps = 300
      looptol = 0.005
      back = on
      normal = off
    arws1: ArrowSurface | expr = {v, w}; xnumber = 100; ynumber = 30; arrowlength = normalized
    arwl1: ArrowLine "Viscous field" | expr = {spf.K_stressy, spf.K_stressz}; arrowlength = proportional
    arws2: ArrowSurface "Total force" | expr = {tot_force_y, 0}
    arws3: ArrowSurface "Pressure" (disabled)
      expr = {pressure_force_y_up, 0}
      arrowxmethod = coord
      xnumber = 100
      xcoord = -rad
      arrowymethod = coord
      ynumber = 30
      ycoord = 0
    arws4: ArrowSurface "Viscous" (disabled)
      expr = {viscous_force_y, 0}
      arrowxmethod = coord
      xnumber = 100
      xcoord = -rad
      arrowymethod = coord
      ynumber = 30
      ycoord = -rad/3
    arwl2: ArrowLine "Viscous field 1" (disabled)
      expr = {(z)*(-spf.nymesh*(up(p)-down(p)) + spf.K_stressy) - (y+rad)*(-spf.nzmesh*(up(p)-down(p)) + spf.K_stressz), 0}
      arrowlength = normalized
  pg6: PlotGroup1D "Probe Plot Group 6"
    tblp1: Table "Probe Table Graph 1" | table = tbl1; plotcolumns = {3, 4, 5, 6, 7, 8, 9, 10, 11}
  pg7: PlotGroup2D "2D Plot Group 7" | data = cpl1
    surf1: Surface | data = cpl1; expr = spf.rho; unit = kg/m^3
    arws1: ArrowSurface (disabled) | expr = {v, w}; xnumber = 100; ynumber = 30
  pg8: PlotGroup1D "1D Plot Group 8" | data = int8
    ptgr1: PointGraph | expr = reacf(u); xdata = solution

Exports
  anim1: Animation
    target = file
    type = imageseq
    movietype = avi
    giffilename = D:\Yaroslav\magnetic-droplets\two_bubbles_mesh2.gif
    avifilename = D:\Yaroslav\magnetic-droplets\translational_movement\flow_spot_on_top.avi
    aviqual = 1
    framesel = all
    size = current
    onlydisplay = off
    options = on
    axes = off
    synchronize = off