// COMSOL Multiphysics 5.1.0.145 model "one_droplet__spot_on_the_bottom.mph"
// Outline of the model tree

Parameters
  rad = (0.5/2) [mm]
  box_width = 10 [mm]

Selections
  sel1: Explicit "Droplet surface" on boundaries 6-10, 13, 15, 16, 18, 19

Probes
  dom1: Domain "Domain Probe 1" on all domains | type = maximum; expr = T; unit = degC; table = tbl1
  bnd1: Boundary "Total Force X (up)" on selection sel1 | type = integral; expr = -spf.T_stress_ux; table = tbl1
  bnd2: Boundary "Total Force Y (up)" on selection sel1
    type = integral
    probename = total_force_y_up
    expr = -spf.T_stress_uy
    table = tbl1
  bnd3: Boundary "Total Force Z (up)" on selection sel1 | type = integral; expr = -spf.T_stress_uz; table = tbl1
  bnd4: Boundary "Viscous force Y" on selection sel1
    type = integral
    probename = viscous_force_y
    expr = spf.K_stressy
    table = tbl1
  bnd7: Boundary "Viscous force Z" on selection sel1 | type = integral; expr = spf.K_stressz; table = tbl1
  bnd5: Boundary "Pressure Y" on selection sel1
    type = integral
    probename = pressure_force_y_up
    expr = -spf.nymesh*up(p)
    table = tbl1
  bnd6: Boundary "Pressure Z" on selection sel1 | type = integral; expr = -spf.nzmesh*up(p); table = tbl1
  bnd11: Boundary "Total Force Y (bothward)" on boundaries 6-10, 13, 15, 16, 18, 19
    type = integral
    expr = -spf.nymesh*(up(p)-down(p)) +spf.K_stressy
    table = tbl1
  bnd12: Boundary "Total Force Z (bothward)" on selection sel1 | type = integral; expr = spf.T_stressz; table = tbl1
  bnd13: Boundary "Torque" on selection sel1
    type = integral
    expr = (z)*(-spf.nymesh*(up(p)-down(p)) + spf.K_stressy) - (y+rad*(1+2.11e-3))*(-spf.nzmesh*(up(p)-down(p)) + spf.K_stressz)
    table = tbl1
  bnd14: Boundary "Torque test" on selection sel1
    type = integral
    expr = (z)*(0) - (y+rad*(1+2.11e-3))*(1)
    table = tbl1
  dom2: Domain "Max speed" on all domains | type = maximum; expr = spf.U; unit = m/s; table = tbl1

Geometry
  geom1 "Geometry 1" (3D, length unit mm)
    blk1: Block | base = center; size = {box_width, box_width, rad*10}
    sph1: Sphere | pos = {0, -2*rad, -0.10}; r = 0.1
    sph3: Sphere | pos = {0, -rad, 0}; r = rad
    sph4: Sphere (disabled) | pos = {0, rad, 0}; r = rad
    par1: Partition "Partition Objects 1" | input = sph3, sph4; tool = sph1
    pt1: Point | p = {box_width*0.4, 0, 0}
    pt2: Point | p = {0, -rad, 0}
    pt3: Point (disabled) | p = {0, -box_width*0.4, 0}
    fin: Finalize "Form Union"

Materials
  mat4: Common "Water and ethyleneglycol 1-1, liquid" on all domains
    def "Basic"
      dynamicviscosity = 2.80*eta(T[1/K])[Pa*s]
      ratioofspecificheat = 1.0
      electricconductivity = 5.5e-6[S/m]
      heatcapacity = 3.41/4.18*Cp(T[1/K])[J/(kg*K)]
      density = 1.055*rho(T[1/K])[kg/m^3]
      thermalconductivity = 0.36/0.6*k(T[1/K])[W/(m*K)]
      soundspeed = cs(T[1/K])[m/s]
      eta: Piecewise
        arg = T
        pieces = 
          {273.15, 413.15, 1.3799566804-0.021224019151*T^1+1.3604562827E-4*T^2-4.6454090319E-7*T^3+8.9042735735E-10*T^4-9.0790692686E-13*T^5+3.8457331488E-16*T^6}
          {413.15, 553.75, 0.00401235783-2.10746715E-5*T^1+3.85772275E-8*T^2-2.39730284E-11*T^3}
      Cp: Piecewise | arg = T; pieces = {273.15, 553.75, 12010.1471-80.4072879*T^1+0.309866854*T^2-5.38186884E-4*T^3+3.62536437E-7*T^4}
      rho: Piecewise | arg = T; pieces = {273.15, 553.75, 838.466135+1.40050603*T^1-0.0030112376*T^2+3.71822313E-7*T^3}
      k: Piecewise | arg = T; pieces = {273.15, 553.75, -0.869083936+0.00894880345*T^1-1.58366345E-5*T^2+7.97543259E-9*T^3}
      cs: Interpolation | table = {{273, 1403}, {278, 1427}, {283, 1447}, {293, 1481}, {303, 1507}, {313, 1526}, {323, 1541}, {333, 1552}, {343, 1555}, {353, 1555}, {363, 1550}, {373, 1543}}; interp = piecewisecubic
  mat3: Common "Toluene(0.33) and DCB(0.66)" on domains 1
    def "Basic"
      dynamicviscosity = 1.09/0.583*eta(T[1/K])[Pa*s]
      heatcapacity = 1.088/1.7*Cp(T[1/K])[J/(kg*K)]
      density = 1155/867*rho(T[1/K])[kg/m^3]
      thermalconductivity = 0.1274/0.141*k(T[1/K])[W/(m*K)]
      ratioofspecificheat = 1
      eta: Piecewise | arg = T; pieces = {253.0, 383.0, 0.0215055169-1.73085791E-4*T^1+4.77480128E-7*T^2-4.4508547E-10*T^3}
      Cp: Piecewise
        arg = T
        pieces = 
          {162.0, 350.0, 1954.89344-6.78419439*T^1+0.0268169568*T^2-2.30150582E-5*T^3}
          {350.0, 500.0, 581.176489+4.95779053*T^1-0.0065998837*T^2+8.63787712E-6*T^3}
      rho: Piecewise | arg = T; pieces = {273.15, 373.15, 1102.75323-0.679749494*T^1-4.23104421E-4*T^2}
      k: Piecewise | arg = T; pieces = {230.0, 360.0, 0.220486602-2.99892954E-4*T^1}

Physics
  spf: LaminarFlow on all domains
    dependent variable u = {u, v, w}
    AdvancedSettingProperty.UsePseudoTime = 1
    fp1: FluidProperties (default)
    init1: init "Initial Values 1" (default)
    wall1: Wall (default) | BoundaryCondition = Slip
    iw1: InteriorWall on boundaries 6-10, 13, 15, 16, 18, 19 | BoundaryCondition = NoSlip
    vf1: VolumeForce on all domains | F = {0, 0, -1*g_const*nitf1.rho}
    prpc1: PressurePointConstraint on points 11, 16
    disc1: Discretization | order_fluid = 2
  ht: HeatTransferInFluids on all domains
    dependent variable T
    ShapeProperty.order_temperature = 1
    fluid1: FluidHeatTransferModel "Heat Transfer in Fluids 1" (default)
    init1: init "Initial Values 1" (default)
    ins1: ThermalInsulation (default)
    hf1: HeatFluxBoundary "Heat Flux 1" on boundaries 4
      HeatFluxType = ConvectiveHeatFlux
      HeatTransferCoefficientType = ExtNaturalConvection
      ExtNaturalConvectionType = HorizontalPlateUp
      Ldia = rad
    bhs1: BoundaryHeatSource on boundaries 10, 13 | heatSourceType = OverallHeatTransferRate; Pb = 70e-3*0.3

Multiphysics
  nitf1: NonIsothermalFlow on all domains
    includeWorkDoneByPressureChanges = 1
    includeViscousDissipation = 1
    Fluid_physics = spf
    Heat_physics = ht

Mesh
  mesh1 "Mesh 1" (physics-controlled)
    size: MeshSizeDefault | table = cfd; hauto = 4

Studies
  std1 "Study 1"
    time: Transient "Time Dependent" | tlist = range(0,1e-2,1); rtol = 0.001

Solver configurations
  sol1 "Solution 1" (study std1)
    v1: Variables "Dependent Variables 1"
    t1: Time "Time-Dependent Solver 1"
      tlist = range(0,1e-2,1)
      atolglobalmethod = scaled
      atolglobal = 5.0E-4
      maxorder = 2
      estrat = exclude
      fc1: FullyCoupled | linsolver = d1; maxiter = 6; damp = 0.9; jtech = once
      d1: Direct | linsolver = pardiso

Datasets
  dset1: Solution | solution = sol1
  surf1: Surface on boundaries 1-5, 20 | data = dset1
  surf2: Surface on boundaries 1-5, 20 | data = dset1
  surf3: Surface | data = dset1
  surf4: Surface on boundaries 1-5, 20 | data = dset1
  surf5: Surface on boundaries 1-5, 20 | data = dset1
  surf6: Surface | data = dset1
  surf7: Surface on boundaries 1-5, 20 | data = dset1
  surf8: Surface on boundaries 1-5, 20 | data = dset1
  surf9: Surface | data = dset1
  cpl1: CutPlane | data = dset1; genpoints = {{0, 0, 0}, {1, 0, 0}, {0, 1, 0}}
  cpl2: CutPlane | data = dset1; quickplane = xy; quickz = 0; genpoints = {{0, 0, 0}, {1, 0, 0}, {0, 1, 0}}
  dset2: Solution "Probe Solution 2" | solution = sol1
  max1: Maximum "Domain Probe 1" on domains 1-3 | data = dset2
  surf10: Surface on boundaries 6-10, 13, 15, 16, 18, 19 | data = dset1
  int1: Integral "Total Force X (up)" on boundaries 6-10, 13, 15, 16, 18, 19 | data = dset2
  int2: Integral "Total Force Y (up)" on boundaries 6-10, 13, 15, 16, 18, 19 | data = dset2
  int3: Integral "Total Force Z (up)" on boundaries 6-10, 13, 15, 16, 18, 19 | data = dset2
  int4: Integral "Viscous force Y" on boundaries 6-10, 13, 15, 16, 18, 19 | data = dset2
  int5: Integral "Pressure Y" on boundaries 6-10, 13, 15, 16, 18, 19 | data = dset2
  int6: Integral "Pressure Z" on boundaries 6-10, 13, 15, 16, 18, 19 | data = dset2
  int7: Integral "Viscous force Z" on boundaries 6-10, 13, 15, 16, 18, 19 | data = dset2
  int8: Integral on boundaries 6-10, 13, 15, 16, 18, 19 | data = dset1; method = summation
  int12: Integral "Total Force Y (bothward)" on boundaries 6-10, 13, 15, 16, 18, 19 | data = dset2
  int13: Integral "Torque" on boundaries 6-10, 13, 15, 16, 18, 19 | data = dset2
  int14: Integral "Total Force Z (bothward)" on boundaries 6-10, 13, 15, 16, 18, 19 | data = dset2
  int15: Integral "Torque test" on boundaries 6-10, 13, 15, 16, 18, 19 | data = dset2
  max2: Maximum "Max speed" on domains 1-3 | data = dset2

Derived values
  pev1: EvalPoint "Domain Probe 1" | data = max1; table = tbl1; expr = T
  pev2: EvalPoint "Total Force X (up)" | data = int1; table = tbl1; expr = -spf.T_stress_ux
  pev3: EvalPoint "Total Force Y (up)" | data = int2; table = tbl1; expr = -spf.T_stress_uy
  pev4: EvalPoint "Total Force Z (up)" | data = int3; table = tbl1; expr = -spf.T_stress_uz
  pev5: EvalPoint "Viscous force Y" | data = int4; table = tbl6; expr = spf.K_stressy
  pev8: EvalPoint "Viscous force Z" | data = int7; table = tbl1; expr = spf.K_stressz
  pev6: EvalPoint "Pressure Y" | data = int5; table = tbl6; expr = -spf.nymesh*(up(p)-down(p))
  pev7: EvalPoint "Pressure Z" | data = int6; table = tbl1; expr = -spf.nzmesh*up(p)
  pev12: EvalPoint "Total Force Y (bothward)"
    data = int12
    table = tbl6
    expr = -spf.nymesh*(up(p)-down(p)) +spf.K_stressy
  int3: IntSurface "reacf_X" on boundaries 6-10, 13, 15, 16, 18, 19 | data = dset1; table = tbl4; expr = reacf(u)
  int2: IntSurface "Surface Integration 2" on boundaries 6-10, 13, 15, 16, 18, 19
    data = dset1
    table = tbl4
    expr = spf.T_stress_dy
    descr = Total stress D, y component
  int1: IntSurface "Surface Integration 1" on boundaries 6-10, 13, 15, 16, 18, 19
    data = dset1
    table = tbl4
    expr = spf.T_stress_uy
    descr = Total stress U, y component
  pev13: EvalPoint "Torque"
    data = int13
    table = tbl1
    expr = (z)*(-spf.nymesh*(up(p)-down(p)) + spf.K_stressy) - (y+rad*(1+2.11e-3))*(-spf.nzmesh*(up(p)-down(p)) + spf.K_stressz)
  pev14: EvalPoint "Total Force Z (bothward)" | data = int14; table = tbl1; expr = spf.T_stressz
  pev15: EvalPoint "Torque test" | data = int15; table = tbl1; expr = (z)*(0) - (y+rad*(1+2.11e-3))*(1)
  pev16: EvalPoint "Max speed" | data = max2; table = tbl1; expr = spf.U

Tables
  tbl1: Table "Probe Table 1"
    Time (s) | Velocity magnitude (m/s), Max speed
    0 | 4.80316e-10
    0.01 | 0.000135644
    0.02 | 0.000299795
    0.03 | 0.000460195
    0.04 | 0.000617792
    0.05 | 0.000768905
    0.06 | 0.000909667
    0.07 | 0.00104008
    0.08 | 0.00116262
    0.09 | 0.00128347
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  tbl4: Table
    // Surface Integration 1 (spf.T_stress_dy)
    Time (s) | Total stress D, y component (N) | Total stress U, y component (N)
    0 | 4.07232e-15 | 2.32366e-14
    0.01 | 4.73037e-12 | 7.43255e-11
    0.02 | 7.43755e-12 | 1.42481e-10
    0.03 | 1.00273e-11 | 2.12174e-10
    0.04 | 1.21806e-11 | 2.87116e-10
    0.05 | 1.41274e-11 | 3.67837e-10
    0.06 | 1.58949e-11 | 4.55984e-10
    0.07 | 1.76037e-11 | 5.52799e-10
    0.08 | 1.87758e-11 | 6.57441e-10
    0.09 | 2.03903e-11 | 7.71065e-10
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  mm1: Table "pg7/mml1"
    // Max/min line
    cpl1x | cpl1y | spf.rho*spf.U*(0.5 [mm])/spf.mu (1)
    -2.5 | -1.25 | 2.65435e-08
    -0.485937 | -0.0826662 | 0.901059
  mm2: Table "pg7/mms1"
    // Max/min surface
    cpl1x | cpl1y | spf.rho*spf.U*(0.5 [mm])/spf.mu (1)
    -0.514975 | -0.0888866 | 1.42603
  tbl6: Table "Forces only"
    // Total Force Y (bothward) (-spf.nymesh*(up(p)-down(p)) +spf.K_stressy)
    Time (s) | -spf.nymesh*(up(p)-down(p)) +spf.K_stressy (N), Total Force Y (bothward) | -spf.nymesh*(up(p)-down(p)) (N), Pressure Y | Viscous stress, y component (N), Viscous force Y
    0 | 2.81159e-14 | 3.0329e-14 | -2.21306e-15
    0.01 | 1.38795e-10 | 1.82356e-10 | -4.35608e-11
    0.02 | 2.60914e-10 | 3.31503e-10 | -7.05886e-11
    0.03 | 3.7066e-10 | 4.60768e-10 | -9.01075e-11
    0.04 | 4.68134e-10 | 5.73051e-10 | -1.04916e-10
    0.05 | 5.52988e-10 | 6.67827e-10 | -1.14838e-10
    0.06 | 6.26237e-10 | 7.47039e-10 | -1.20802e-10
    0.07 | 6.88138e-10 | 8.11606e-10 | -1.23467e-10
    0.08 | 7.38886e-10 | 8.62513e-10 | -1.23627e-10
    0.09 | 7.79636e-10 | 9.01684e-10 | -1.22048e-10
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  tbl7: Table
    // Torque ((z)*(-spf.nymesh*(up(p)-down(p)) + spf.K_stressy) - (y+rad)*(-spf.nzmesh*(up(p)-down(p)) + spf.K_stressz))
    Time (s) | (z)*(-spf.nymesh*(up(p)-down(p)) + spf.K_stressy) - (y+rad)*(-spf.nzmesh*(up(p)-down(p)) + spf.K_stressz) (J), Torque | (z)*(-spf.nymesh*1) - (y+rad)*(-spf.nzmesh) (m^3), Torque | (z)*(1) - (y+rad)*(1) (m^3), Torque
    0 | 3.8211e-14 | -5.96946e-29 | 3.99639e-13
    0.01 | 8.70486e-14 | -5.96946e-29 | 3.99639e-13
    0.02 | 1.33986e-13 | -5.96946e-29 | 3.99639e-13
    0.03 | 1.79645e-13 | -5.96946e-29 | 3.99639e-13
    0.04 | 2.24828e-13 | -5.96946e-29 | 3.99639e-13
    0.05 | 2.69057e-13 | -5.96946e-29 | 3.99639e-13
    0.06 | 3.12224e-13 | -5.96946e-29 | 3.99639e-13
    0.07 | 3.54503e-13 | -5.96946e-29 | 3.99639e-13
    0.08 | 3.96093e-13 | -5.96946e-29 | 3.99639e-13
    0.09 | 4.36804e-13 | -5.96946e-29 | 3.99639e-13
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  tbl8: Table
    // Torque ((z)*(1) - (y+rad)*(1))
    Time (s) | (z)*(1) - (y+rad*(1+2.39e-3))*(0) (m^3), Torque
    0 | -1.27783e-14
    0.01 | -1.27783e-14
    0.02 | -1.27783e-14
    0.03 | -1.27783e-14
    0.04 | -1.27783e-14
    0.05 | -1.27783e-14
    0.06 | -1.27783e-14
    0.07 | -1.27783e-14
    0.08 | -1.27783e-14
    0.09 | -1.27783e-14
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
Plots
  pg2: PlotGroup1D "Probe Plot Group 2" | data = none
    tblp1: Table "Probe Table Graph 1" | table = tbl1; plotcolumns = 2
  pg3: PlotGroup2D "Flow" | data = cpl1; animating = off
    surf1: Surface | expr = ht.C_eff; unit = J/(m^3*K)
    str1: Streamline
      expr = {v, w}
      startmethod = coord
      xcoord = -2.00 -2.00 -2.00 -2.00 -2.00 -2.00 -2.00 -2.00 -2.00 -2.00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
      ycoord = -1.00 -0.90 -0.80 -0.70 -0.60 -0.50 -0.40 -0.30 -0.20 -0.10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
      linetype = tube
      radiusexpr = 0.1
      tuberadiusscale = 0.004
      inttol = 0.0001
      maxsteps = 500
      stattol = 0.01
      looptol = 0.005
    arws1: ArrowSurface | expr = {v, w}; xnumber = 100; ynumber = 30; arrowlength = normalized
    arwl1: ArrowLine "Viscous field" | expr = {spf.K_stressy, spf.K_stressz}
    arws2: ArrowSurface "Total force"
      expr = {bnd11, 0}
      arrowxmethod = coord
      xcoord = -rad
      arrowymethod = coord
      ycoord = 0
  pg4: PlotGroup3D "3D Plot Group 4" | data = surf10
    surf1: Surface (disabled) | expr = p
    arws1: ArrowSurface | expr = {spf.K_stressx, spf.K_stressy, spf.K_stressz}
    arws2: ArrowSurface (disabled) | expr = {-p*spf.nxmesh, -p*spf.nymesh, -p*spf.nzmesh}
    arws3: ArrowSurface (disabled) | expr = {spf.T_stressx, spf.T_stressy, spf.T_stressz}
  pg5: PlotGroup2D "2D Plot Group 5" | data = cpl1
    surf1: Surface | expr = p; unit = Pa
    arws1: ArrowSurface (disabled) | expr = {v, w}; xnumber = 100; ynumber = 30
  pg6: PlotGroup1D "Probe Plot Group 6"
    tblp1: Table "Probe Table Graph 1" | table = tbl1
  pg7: PlotGroup2D "Reynolds number" | data = cpl1; animating = off
    surf1: Surface
      expr = spf.rho*spf.U*(0.5 [mm])/spf.mu
      unit = 1
      descr = : Reynolds number
      title = : "local" Reynolds number
    arws1: ArrowSurface (disabled) | expr = {v, w}; xnumber = 100; ynumber = 30
    con1: Contour (disabled)
      expr = spf.rho*spf.U*(0.5 [mm])/spf.mu
      levelmethod = levels
      levels = range(0,1,8)
      contourtype = lines
      contourlabels = on
    mms1: MaxMinSurface | expr = spf.rho*spf.U*(0.5 [mm])/spf.mu; display = max; table = mm2
  pg8: PlotGroup1D "1D Plot Group 8" | data = int8
    ptgr1: PointGraph | expr = reacf(u); xdata = solution

Exports
  anim1: Animation "Flow Animation"
    target = file
    type = imageseq
    movietype = gif
    giffilename = D:\Yaroslav\magnetic-droplets\translational_movement\spot_on_bottom.gif
    avifilename = D:\Yaroslav\magnetic-droplets\translational_movement\flow__spot_on_bottom.avi
    aviqual = 1
    framesel = number
    size = current
    onlydisplay = off
    frametime = 0.03
    options = on
    axes = off