// COMSOL Multiphysics 5.1.0.145 model "two_droplets__spot_in_between.mph"
// Outline of the model tree

Parameters
  rad = (0.5/2) [mm]

Probes
  dom1: Domain "Domain Probe 1" on all domains | type = maximum; expr = T; unit = degC; table = tbl1

Geometry
  geom1 "Geometry 1" (3D, length unit mm)
    blk1: Block | base = center; size = {rad*10, rad*20, rad*10}
    sph1: Sphere | pos = {0, 0, 0.05}; r = 0.1
    sph3: Sphere | pos = {0, -rad, 0}; r = rad
    sph4: Sphere | pos = {0, rad, 0}; r = rad
    par1: Partition "Partition Objects 1" | input = sph3, sph4; tool = sph1
    pt1: Point | p = {0, rad, 0}
    pt2: Point | p = {0, -rad, 0}
    pt3: Point | p = {0, -rad-(0.3 [mm]), 0}
    fin: Finalize "Form Union"

Materials
  mat4: Common "Water and ethyleneglycol 1-1, liquid" on all domains
    def "Basic"
      dynamicviscosity = 2.80*eta(T[1/K])[Pa*s]
      ratioofspecificheat = 1.0
      electricconductivity = 5.5e-6[S/m]
      heatcapacity = 3.41/4.18*Cp(T[1/K])[J/(kg*K)]
      density = 1.055*rho(T[1/K])[kg/m^3]
      thermalconductivity = 0.36/0.6*k(T[1/K])[W/(m*K)]
      soundspeed = cs(T[1/K])[m/s]
      eta: Piecewise
        arg = T
        pieces = 
          {273.15, 413.15, 1.3799566804-0.021224019151*T^1+1.3604562827E-4*T^2-4.6454090319E-7*T^3+8.9042735735E-10*T^4-9.0790692686E-13*T^5+3.8457331488E-16*T^6}
          {413.15, 553.75, 0.00401235783-2.10746715E-5*T^1+3.85772275E-8*T^2-2.39730284E-11*T^3}
      Cp: Piecewise | arg = T; pieces = {273.15, 553.75, 12010.1471-80.4072879*T^1+0.309866854*T^2-5.38186884E-4*T^3+3.62536437E-7*T^4}
      rho: Piecewise | arg = T; pieces = {273.15, 553.75, 838.466135+1.40050603*T^1-0.0030112376*T^2+3.71822313E-7*T^3}
      k: Piecewise | arg = T; pieces = {273.15, 553.75, -0.869083936+0.00894880345*T^1-1.58366345E-5*T^2+7.97543259E-9*T^3}
      cs: Interpolation | table = {{273, 1403}, {278, 1427}, {283, 1447}, {293, 1481}, {303, 1507}, {313, 1526}, {323, 1541}, {333, 1552}, {343, 1555}, {353, 1555}, {363, 1550}, {373, 1543}}; interp = piecewisecubic
  mat3: Common "Toluene(0.33) and DCB(0.66)" on domains 1
    def "Basic"
      dynamicviscosity = 1.09/0.583*eta(T[1/K])[Pa*s]
      heatcapacity = 1.088/1.7*Cp(T[1/K])[J/(kg*K)]
      density = 1155/867*rho(T[1/K])[kg/m^3]
      thermalconductivity = 0.1274/0.141*k(T[1/K])[W/(m*K)]
      ratioofspecificheat = 1
      eta: Piecewise | arg = T; pieces = {253.0, 383.0, 0.0215055169-1.73085791E-4*T^1+4.77480128E-7*T^2-4.4508547E-10*T^3}
      Cp: Piecewise
        arg = T
        pieces = 
          {162.0, 350.0, 1954.89344-6.78419439*T^1+0.0268169568*T^2-2.30150582E-5*T^3}
          {350.0, 500.0, 581.176489+4.95779053*T^1-0.0065998837*T^2+8.63787712E-6*T^3}
      rho: Piecewise | arg = T; pieces = {273.15, 373.15, 1102.75323-0.679749494*T^1-4.23104421E-4*T^2}
      k: Piecewise | arg = T; pieces = {230.0, 360.0, 0.220486602-2.99892954E-4*T^1}

Physics
  spf: LaminarFlow on all domains
    dependent variable u = {u, v, w}
    AdvancedSettingProperty.UsePseudoTime = 1
    fp1: FluidProperties (default)
    init1: init "Initial Values 1" (default)
    wall1: Wall (default) | BoundaryCondition = Slip
    iw1: InteriorWall on boundaries 6-13, 15, 17, 20-25, 28-31, 33, 35-37 | BoundaryCondition = Slip
    vf1: VolumeForce on all domains | F = {0, 0, -1*g_const*spf.rho}
    prpc1: PressurePointConstraint on points 11, 14, 24
  ht: HeatTransferInFluids on all domains
    dependent variable T
    ShapeProperty.order_temperature = 1
    fluid1: FluidHeatTransferModel "Heat Transfer in Fluids 1" (default)
    init1: init "Initial Values 1" (default)
    ins1: ThermalInsulation (default)
    hf1: HeatFluxBoundary "Heat Flux 1" on boundaries 4
      HeatFluxType = ConvectiveHeatFlux
      HeatTransferCoefficientType = ExtNaturalConvection
      ExtNaturalConvectionType = HorizontalPlateUp
      Ldia = rad
    bhs1: BoundaryHeatSource on boundaries 15, 17, 28, 31 | heatSourceType = OverallHeatTransferRate; Pb = 70e-3*0.3

Multiphysics
  nitf1: NonIsothermalFlow on all domains
    includeWorkDoneByPressureChanges = 0
    includeViscousDissipation = 0
    Fluid_physics = spf
    Heat_physics = ht

Mesh
  mesh1 "Mesh 1" (physics-controlled)
    size: MeshSizeDefault | table = cfd; hauto = 4

Studies
  std1 "Study 1"
    time: Transient "Time Dependent" | tlist = range(0,1e-2,1); rtol = 0.001

Solver configurations
  sol1 "Solution 1" (study std1)
    v1: Variables "Dependent Variables 1"
    t1: Time "Time-Dependent Solver 1"
      tlist = range(0,1e-2,1)
      atolglobalmethod = scaled
      atolglobal = 5.0E-4
      maxorder = 2
      estrat = exclude
      fc1: FullyCoupled | linsolver = d1; maxiter = 6; damp = 0.9; jtech = once
      d1: Direct | linsolver = pardiso

Datasets
  dset1: Solution | solution = sol1
  surf1: Surface on boundaries 1-5, 38 | data = dset1
  surf2: Surface on boundaries 1-5, 38 | data = dset1
  surf3: Surface | data = dset1
  surf4: Surface on boundaries 1-5, 38 | data = dset1
  surf5: Surface on boundaries 1-5, 38 | data = dset1
  surf6: Surface | data = dset1
  surf7: Surface on boundaries 1-5, 38 | data = dset1
  surf8: Surface on boundaries 1-5, 38 | data = dset1
  surf9: Surface | data = dset1
  cpl1: CutPlane | data = dset1; genpoints = {{0, 0, 0}, {1, 0, 0}, {0, 1, 0}}
  cpl2: CutPlane | data = dset1; quickplane = zx; genpoints = {{0, 0, 0}, {1, 0, 0}, {0, 1, 0}}
  dset2: Solution "Probe Solution 2" | solution = sol1
  max1: Maximum "Domain Probe 1" on domains 1-5 | data = dset2

Derived values
  pev1: EvalPoint "Domain Probe 1" | data = max1; table = tbl1; expr = T

Tables
  tbl1: Table "Probe Table 1"
    t | Temperature (degC), Domain Probe 1
    0 | 20.0645
    0.000593784 | 28.0639
    0.00118757 | 32.7954
    0.00237514 | 39.6992
    0.00475028 | 46.9776
    0.00712541 | 52.7815
    0.0118757 | 61.5756
    0.0213762 | 72.3061
    0.0308768 | 79.4318
    0.0498779 | 87.8651
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
Plots
  pg1: PlotGroup3D "3D Plot Group 1" | data = cpl1
    surf1: Surface | expr = T; unit = degC; title = Temperature (color, degrees Celcius)
    arws1: ArrowSurface (disabled) | expr = {u, v, w}; arrowcount = 500
    con1: Contour (disabled)
      expr = T
      unit = degC
      levelmethod = levels
      levels = 100
      contourtype = tubes
      contourlabels = off
      radiusexpr = 0.001
      tuberadiusscale = 2
  pg2: PlotGroup1D "Probe Plot Group 2" | data = none
    tblp1: Table "Probe Table Graph 1" | table = tbl1; plotcolumns = 2

Exports
  anim1: Animation
    type = movie
    giffilename = D:\Yaroslav\magnetic-droplets\two_bubbles_mesh2.gif
    framesel = all
    size = current
    options = on
    axes = on